New "StorageController.sc3" Element=Line.l1 Terminal=1 ElementList=[Battery3] ModeDischarge=Loadshape Daily=scloadshape3 EventLog=Yes
New "StorageController.sc18" Element=Line.l1 Terminal=1 ElementList=[Battery18] ModeDischarge=Loadshape Daily=scloadshape18 EventLog=Yes
New "StorageController.sc35" Element=Line.l1 Terminal=1 ElementList=[Battery35] ModeDischarge=Loadshape Daily=scloadshape35 EventLog=Yes
New "StorageController.sc48" Element=Line.l1 Terminal=1 ElementList=[Battery48] ModeDischarge=Loadshape Daily=scloadshape48 EventLog=Yes
New "StorageController.sc61" Element=Line.l1 Terminal=1 ElementList=[Battery61] ModeDischarge=Loadshape Daily=scloadshape61 EventLog=Yes
New "StorageController.sc73" Element=Line.l1 Terminal=1 ElementList=[Battery73] ModeDischarge=Loadshape Daily=scloadshape73 EventLog=Yes
New "StorageController.sc87" Element=Line.l1 Terminal=1 ElementList=[Battery87] ModeDischarge=Loadshape Daily=scloadshape87 EventLog=Yes
New "StorageController.sc101" Element=Line.l1 Terminal=1 ElementList=[Battery101] ModeDischarge=Loadshape Daily=scloadshape101 EventLog=Yes
New "StorageController.sc116" Element=Line.l1 Terminal=1 ElementList=[Battery116] ModeDischarge=Loadshape Daily=scloadshape116 EventLog=Yes
